# OpenSim document version 40000
InverseKinematicsTool:
  results_directory: ./
  model_file: ../S00_Demo_Session/S00_P00_SingleParticipant/S00_P00_OpenSim/Model_Pose2Sim_S00_P00_coco_scaled.osim
  constraint_weight: Inf
  accuracy: 1e-5
  time_range: 0.01666667 1.666667
  output_motion_file: ../S00_Demo_Session/S00_P00_SingleParticipant/S00_P00_OpenSim/S00_P00_T01_BalancingTrial_filt_butterworth_0-100_coco.mot
  report_errors: true
  marker_file: ../S00_Demo_Session/S00_P00_SingleParticipant/S00_P00_T01_BalancingTrial/pose-3d/S00_P00_T01_BalancingTrial_0-100_filt_butterworth.trc
  report_marker_locations: false
  IKTaskSet:
    IKMarkerTask Nose: apply=true weight=0.1
    IKMarkerTask Neck: apply=true weight=0.2
    IKMarkerTask LShoulder: apply=true weight=2
    IKMarkerTask RShoulder: apply=true weight=2
    IKMarkerTask LElbow: apply=true weight=1
    IKMarkerTask RElbow: apply=true weight=1
    IKMarkerTask LWrist: apply=true weight=1
    IKMarkerTask RWrist: apply=true weight=1
    IKMarkerTask LHip: apply=true weight=2
    IKMarkerTask RHip: apply=true weight=2
    IKMarkerTask LKnee: apply=true weight=1
    IKMarkerTask RKnee: apply=true weight=1
    IKMarkerTask LAnkle: apply=true weight=1
    IKMarkerTask RAnkle: apply=true weight=1
    IKCoordinateTask L5_S1_Flex_Ext: apply=true weight=0.1 value_type=default_value value=0
