# OpenSim document version 40000
InverseKinematicsTool:
  results_directory: ./
  model_file: ../S00_Demo_Session/S00_P00_SingleParticipant/S00_P00_OpenSim/Model_Pose2Sim_S00_P00_LSTM_scaled.osim
  constraint_weight: Inf
  accuracy: 1e-5
  time_range: 0.01666667 1.666667
  output_motion_file: ../S00_Demo_Session/S00_P00_SingleParticipant/S00_P00_OpenSim/S00_P00_T01_BalancingTrial_filt_butterworth_0-100_LSTM.mot
  report_errors: true
  marker_file: ../S00_Demo_Session/S00_P00_SingleParticipant/S00_P00_T01_BalancingTrial/pose-3d/S00_P00_T01_BalancingTrial_0-100_filt_butterworth_LSTM.trc
  report_marker_locations: false
  IKTaskSet:
    IKMarkerTask C7_study: apply=true weight=5
    IKMarkerTask r_shoulder_study: apply=true weight=5
    IKMarkerTask L_shoulder_study: apply=true weight=5
    IKMarkerTask r.ASIS_study: apply=true weight=25
    IKMarkerTask L.ASIS_study: apply=true weight=25
    IKMarkerTask r.PSIS_study: apply=true weight=25
    IKMarkerTask L.PSIS_study: apply=true weight=25
    IKMarkerTask r_knee_study: apply=true weight=30
    IKMarkerTask r_mknee_study: apply=true weight=30
    IKMarkerTask r_ankle_study: apply=true weight=30
    IKMarkerTask r_mankle_study: apply=true weight=30
    IKMarkerTask r_toe_study: apply=true weight=30
    IKMarkerTask r_5meta_study: apply=true weight=30
    IKMarkerTask r_calc_study: apply=true weight=60
    IKMarkerTask L_knee_study: apply=true weight=30
    IKMarkerTask L_mknee_study: apply=true weight=30
    IKMarkerTask L_ankle_study: apply=true weight=30
    IKMarkerTask L_mankle_study: apply=true weight=30
    IKMarkerTask L_toe_study: apply=true weight=30
    IKMarkerTask L_calc_study: apply=true weight=60
    IKMarkerTask L_5meta_study: apply=true weight=30
    IKMarkerTask r_lelbow_study: apply=true weight=5
    IKMarkerTask L_lelbow_study: apply=true weight=5
    IKMarkerTask r_melbow_study: apply=true weight=5
    IKMarkerTask L_melbow_study: apply=true weight=5
    IKMarkerTask r_lwrist_study: apply=true weight=5
    IKMarkerTask L_lwrist_study: apply=true weight=5
    IKMarkerTask r_mwrist_study: apply=true weight=5
    IKMarkerTask L_mwrist_study: apply=true weight=5
    IKMarkerTask r_thigh1_study: apply=true weight=4
    IKMarkerTask r_thigh2_study: apply=true weight=4
    IKMarkerTask r_thigh3_study: apply=true weight=4
    IKMarkerTask L_thigh1_study: apply=true weight=4
    IKMarkerTask L_thigh2_study: apply=true weight=4
    IKMarkerTask L_thigh3_study: apply=true weight=4
    IKMarkerTask r_sh1_study: apply=true weight=4
    IKMarkerTask r_sh2_study: apply=true weight=4
    IKMarkerTask r_sh3_study: apply=true weight=4
    IKMarkerTask L_sh1_study: apply=true weight=4
    IKMarkerTask L_sh2_study: apply=true weight=4
    IKMarkerTask L_sh3_study: apply=true weight=4
    IKMarkerTask RHJC_study: apply=true weight=25
    IKMarkerTask LHJC_study: apply=true weight=25
    IKMarkerTask RThumb: apply=true weight=1
    IKMarkerTask RIndex: apply=true weight=1
    IKMarkerTask RPinky: apply=true weight=1
    IKMarkerTask LThumb: apply=true weight=1
    IKMarkerTask LIndex: apply=true weight=1
    IKMarkerTask LPinky: apply=true weight=1
    IKCoordinateTask [values shared by the 9 below unless stated]: apply=true value_type=manual_value value=0
    IKCoordinateTask sh_tx_l: weight=0.001
    IKCoordinateTask sh_ty_l: weight=0.001
    IKCoordinateTask sh_tz_l: weight=0.001
    IKCoordinateTask sh_axial_rot_l: weight=0.00005
    IKCoordinateTask sh_tx_r: weight=0.001
    IKCoordinateTask sh_ty_r: weight=0.001
    IKCoordinateTask sh_tz_r: weight=0.001
    IKCoordinateTask sh_axial_rot_r: weight=0.00005
    IKCoordinateTask L5_S1_Flex_Ext: weight=0.1 value_type=default_value
