# OpenSim document version 40000
# Mediapipe BlazePose markers for Model_Pose2Sim.osim.
MarkerSet:
  Marker nose: head (0.09945218 0.5429049 0.0001528855) fixed=true
  Marker left_eye: head (0.0772278 0.557532 -0.0312316) fixed=true
  Marker right_eye: head (0.0772278 0.557532 0.0312316)
  Marker left_shoulder: torso (-0.01275162 0.3663071 -0.2015742) fixed=true
  Marker right_shoulder: torso (-0.01275162 0.3663071 0.2015742) fixed=true
  Marker left_elbow: humerus_l (0.025 -0.297955 0.00873765) fixed=true
  Marker right_elbow: humerus_r (0.025 -0.297955 -0.00873765) fixed=true
  Marker left_wrist: radius_l (-0.0001735891 -0.235096 -0.009743795) fixed=true
  Marker right_wrist: radius_r (-0.0001735891 -0.235096 0.009743795) fixed=true
  Marker left_hip: pelvis (-0.06392744 -0.08134311 -0.1054064) fixed=true
  Marker right_hip: pelvis (-0.06392744 -0.08134311 0.1054064) fixed=true
  Marker left_knee: femur_l (-0.00541048 -0.397886 -0.000611877) fixed=true
  Marker right_knee: femur_r (-0.00541048 -0.397886 0.000611877) fixed=true
  Marker left_ankle: tibia_l (-0.0002863098 -0.408051 -0.01495955) fixed=true
  Marker right_ankle: tibia_r (-0.0002863098 -0.408051 0.01495955) fixed=true
  Marker left_foot_index: toes_l (0.03613372 0.009867125 -0.0001010556) fixed=true
  Marker left_heel: calcn_l (0.01358603 0.02330436 0.001886717) fixed=true
  Marker right_foot_index: toes_r (0.0361337 0.00986712 0.000101056) fixed=true
  Marker right_heel: calcn_r (0.01358603 0.02330436 -0.001886717) fixed=true
  Marker right_thumb: hand_r (0.007534816 -0.03654842 0.02945656)
  Marker right_pinky: hand_r (0.00454517 -0.0613001 -0.0149901)
  Marker right_index: hand_r (0.0015161 -0.0627459 0.0179028)
  Marker left_thumb: hand_l (0.007742858 -0.03304775 -0.03497757)
  Marker left_pinky: hand_l (0.001516098 -0.06274589 0.01790278)
  Marker left_index: hand_l (0.004545171 -0.06130006 -0.01499006) fixed=true
