# OpenSim document version 40000
# COCO17 markers for Model_Pose2Sim.osim.
MarkerSet:
  Marker Nose: head (0.1076238 0.5429049 0.0001528855) fixed=true
  Marker Neck: torso (-0.0127516 0.366307 -0.000509) fixed=true
  Marker LShoulder: torso (-0.01275162 0.3663071 -0.2015742) fixed=true
  Marker RShoulder: torso (-0.01275162 0.3663071 0.2015742) fixed=true
  Marker LElbow: humerus_l (0.025 -0.2979545 0.008737653) fixed=true
  Marker RElbow: humerus_r (0.025 -0.2979545 -0.008737653) fixed=true
  Marker LWrist: radius_l (-0.0001735891 -0.235096 -0.009743795) fixed=true
  Marker RWrist: radius_r (-0.0001735891 -0.235096 0.009743795) fixed=true
  Marker LHip: pelvis (-0.06392744 -0.08134311 -0.1054064) fixed=true
  Marker RHip: pelvis (-0.06392744 -0.08134311 0.1054064) fixed=true
  Marker LKnee: femur_l (-0.005410485 -0.3861322 -0.005110697) fixed=true
  Marker RKnee: femur_r (-0.005410485 -0.3861322 0.005110697) fixed=true
  Marker LAnkle: tibia_l (-0.0002863098 -0.3768398 -0.01495955) fixed=true
  Marker RAnkle: tibia_r (-0.0002863098 -0.3768398 0.01495955) fixed=true
