# OpenSim document version 40000
# AlphaPose Halpe68 or Halpe136 markers for Model_Pose2Sim.osim.
MarkerSet:
  Marker Nose: head (0.1076238 0.5429049 0.0001528855) fixed=true
  Marker Head: head (0.06550926 0.6679245 -0.000647531) fixed=true
  Marker Neck: torso (-0.0008130659 0.4468969 0.0001848562) fixed=true
  Marker LShoulder: torso (-0.01275162 0.3663071 -0.2015742) fixed=true
  Marker RShoulder: torso (-0.01275162 0.3663071 0.2015742) fixed=true
  Marker LElbow: humerus_l (0.025 -0.2979545 0.008737653) fixed=true
  Marker RElbow: humerus_r (0.025 -0.2979545 -0.008737653) fixed=true
  Marker LWrist: radius_l (-0.0001735891 -0.235096 -0.009743795) fixed=true
  Marker RWrist: radius_r (-0.0001735891 -0.235096 0.009743795) fixed=true
  Marker Hip: pelvis (-0.0639274 0 0)
  Marker LHip: pelvis (-0.06392744 -0.08134311 -0.1054064) fixed=true
  Marker RHip: pelvis (-0.06392744 -0.08134311 0.1054064) fixed=true
  Marker LKnee: femur_l (-0.005410485 -0.3861322 -0.005110697) fixed=true
  Marker RKnee: femur_r (-0.005410485 -0.3861322 0.005110697) fixed=true
  Marker LAnkle: tibia_l (-0.0002863098 -0.3768398 -0.01495955) fixed=true
  Marker RAnkle: tibia_r (-0.0002863098 -0.3768398 0.01495955) fixed=true
  Marker LBigToe: toes_l (0.0646643 0.009869336 0.01458025) fixed=true
  Marker LSmallToe: toes_l (0.02711665 0.009571644 -0.02878016) fixed=true
  Marker LHeel: calcn_l (0.01358603 0.02330436 0.001886717) fixed=true
  Marker RBigToe: toes_r (0.0646643 0.009869336 -0.01458025) fixed=true
  Marker RSmallToe: toes_r (0.02711665 0.009571644 0.02878016) fixed=true
  Marker RHeel: calcn_r (0.01358603 0.02330436 -0.001886717) fixed=true
  Marker RThumb: hand_r (0.0159006 -0.0535301 0.0452196)
  Marker RIndex: hand_r (0.00311829 -0.0826109 0.0160293)
  Marker RPinky: hand_r (0.00311312 -0.0738103 -0.0325446)
  Marker LThumb: hand_l (0.0159006 -0.05353005 -0.0452196)
  Marker LIndex: hand_l (0.003118293 -0.08261089 -0.01602926)
  Marker LPinky: hand_l (0.003113118 -0.07381032 0.0325446)
