# OpenSim document version 40000
# OpenCap LSTM markers for Model_Pose2Sim.osim.
MarkerSet:
  Marker r.ASIS_study: pelvis (0.028 0.01 0.128)
  Marker L.ASIS_study: pelvis (0.028 0.01 -0.128)
  Marker r.PSIS_study: pelvis (-0.154 0.025 0.05)
  Marker L.PSIS_study: pelvis (-0.154 0.025 -0.05)
  Marker r_knee_study: femur_r (0.008 -0.404 0.055)
  Marker r_mknee_study: femur_r (0.011 -0.401 -0.055)
  Marker r_ankle_study: tibia_r (-0.02 -0.385 0.053)
  Marker r_mankle_study: tibia_r (0.006 -0.38 -0.038)
  Marker r_toe_study: calcn_r (0.186844 0.00836653 0.00526621)
  Marker r_5meta_study: calcn_r (0.14 0.005 0.065)
  Marker r_calc_study: calcn_r (-0.0321615 0.0325693 -0.0111695)
  Marker L_knee_study: femur_l (0.008 -0.404 -0.055)
  Marker L_mknee_study: femur_l (0.011 -0.401 0.055)
  Marker L_ankle_study: tibia_l (-0.02 -0.385 -0.053)
  Marker L_mankle_study: tibia_l (0.006 -0.38 0.038)
  Marker L_toe_study: calcn_l (0.186844 0.00836653 -0.00526621)
  Marker L_calc_study: calcn_l (-0.0321615 0.0325693 0.0111695)
  Marker L_5meta_study: calcn_l (0.14 0.005 -0.065)
  Marker r_shoulder_study: torso (0 0.418 0.142)
  Marker L_shoulder_study: torso (0 0.418 -0.142)
  Marker C7_study: torso (-0.08 0.42 0.003)
  Marker r_lelbow_study: humerus_r (0.015 -0.28 0.04) fixed=true
  Marker r_melbow_study: humerus_r (0.00225 -0.286 -0.05) fixed=true
  Marker r_lwrist_study: radius_r (0.0005 -0.225 0.05) fixed=true
  Marker r_mwrist_study: radius_r (-0.022 -0.225 -0.022) fixed=true
  Marker L_lelbow_study: humerus_l (0.015 -0.28 -0.04) fixed=true
  Marker L_melbow_study: humerus_l (0.00225 -0.286 0.05) fixed=true
  Marker L_lwrist_study: radius_l (0.0005 -0.225 -0.05) fixed=true
  Marker L_mwrist_study: radius_l (-0.022 -0.225 0.022) fixed=true
  Marker r_thigh1_study: femur_r (0.09 -0.15 0.07)
  Marker r_thigh2_study: femur_r (0.055 -0.25 0.085)
  Marker r_thigh3_study: femur_r (-0.02 -0.14 0.1)
  Marker L_thigh1_study: femur_l (0.09 -0.15 -0.07)
  Marker L_thigh2_study: femur_l (0.055 -0.25 -0.085)
  Marker L_thigh3_study: femur_l (-0.02 -0.14 -0.1)
  Marker r_sh1_study: tibia_r (0 -0.115 0.07)
  Marker r_sh2_study: tibia_r (0.026 -0.23 0.08)
  Marker r_sh3_study: tibia_r (-0.05 -0.22 0.08)
  Marker L_sh1_study: tibia_l (0 -0.115 -0.07)
  Marker L_sh2_study: tibia_l (0.026 -0.23 -0.08)
  Marker L_sh3_study: tibia_l (-0.05 -0.22 -0.08)
  Marker RHJC_study: pelvis (-0.056276 -0.07849 0.07726)
  Marker LHJC_study: pelvis (-0.056276 -0.07849 -0.07726)
  Marker RThumb: hand_r (0.0159006 -0.0535301 0.0452196)
  Marker RIndex: hand_r (0.00311829 -0.0826109 0.0160293)
  Marker RPinky: hand_r (0.00311312 -0.0738103 -0.0325446)
  Marker LThumb: hand_l (0.0159006 -0.05353005 -0.0452196)
  Marker LIndex: hand_l (0.003118293 -0.08261089 -0.01602926)
  Marker LPinky: hand_l (0.003113118 -0.07381032 0.0325446)
  Marker Nose: head (0.116266 0.0126096 0.000152885) fixed=true
  Marker REye: head (0.084464 0.0452599 0.0311069) fixed=true
  Marker LEye: head (0.084464 0.0452599 -0.0311069) fixed=true
  Marker RShoulder: torso (-0.01275162 0.3663071 0.2015742) fixed=true
  Marker LShoulder: torso (-0.01275162 0.3663071 -0.2015742) fixed=true
  Marker RElbow: humerus_r (0.025 -0.2979545 -0.008737653) fixed=true
  Marker LElbow: humerus_l (0.025 -0.2979545 0.008737653) fixed=true
