# OpenSim document version 40500
# BSM/SMPL SKEL markers for Model_Pose2Sim.osim.
MarkerSet:
  Marker BLTI: tibia_l (-0.04071689 -0.2707562 -0.01095489)
  Marker BRTI: tibia_r (-0.04487311 -0.27247 0.006661895)
  Marker C7: torso (-0.07452119 0.3856704 0.003181386) fixed=true
  Marker CHIN: head (0.09505956 0.477093 0.00228161) fixed=true
  Marker CLAV: torso (0.05576895 0.3581936 -0.0003975182) fixed=true
  Marker FBBT: tibia_l (0.01265011 -0.3012372 -0.02263181)
  Marker FLTI: tibia_l (0.01329597 -0.1916762 0.0299612)
  Marker FRBT: tibia_r (0.02738151 -0.3210999 0.02377437)
  Marker FRTI: tibia_r (0.01231786 -0.1954429 -0.02414321)
  Marker LAKI: tibia_l (1.328381e-6 -0.397511 0.03097916) fixed=true
  Marker LANK: tibia_l (-0.003261357 -0.4123452 -0.04849712) fixed=true
  Marker LBAC: torso (-0.0945989 0.258656 -0.09145102)
  Marker LBHD: head (-0.04904542 0.5380346 -0.04616332) fixed=true
  Marker LBWT: pelvis (-0.1659771 0.04344884 -0.03537643) fixed=true
  Marker LELB: ulna_l (-0.04015864 -0.002323685 -0.006000907) fixed=true
  Marker LELS: humerus_l (0 -0.2842 0.04275382) fixed=true
  Marker LELSO: humerus_l (0.01543715 -0.285532 -0.03497439) fixed=true
  Marker LFBB: femur_l (-0.06059511 -0.3098357 -0.005347364)
  Marker LFBT: femur_l (-0.09018007 -0.1792718 0.0002221493)
  Marker LFFB: femur_l (0.06975942 -0.3575659 0.002608764)
  Marker LFFT: femur_l (0.04706064 -0.1647846 0.04469979)
  Marker LFHD: head (0.06511027 0.5869823 -0.06030583) fixed=true
  Marker LFIN: hand_l (-0.01396465 -0.08435236 0.005839852) fixed=true
  Marker LFLB: femur_l (0.01455678 -0.3223885 -0.05645907)
  Marker LFLT: femur_l (-0.01331295 -0.1582996 -0.08780353)
  Marker LFMB: femur_l (0.01316084 -0.3105107 0.05602485)
  Marker LFMT: femur_l (-0.01299328 -0.1586424 0.0815081)
  Marker LFPI: toes_l (0.0132 -0.006719 -0.051954) fixed=true
  Marker LFRM: ulna_l (-0.05894975 -0.09656185 -0.01843853)
  Marker LFWT: pelvis (0.006 0.01415186 -0.115853)
  Marker LHAP: humerus_l (0.005681447 -0.1012299 0.03327627)
  Marker LHBA: humerus_l (-0.04680053 -0.1657415 0.02180088)
  Marker LHEB: calcn_l (0.014687 -0.023699 0.010602) fixed=true
  Marker LHEE: calcn_l (-0.01329385 0.01602225 0.004569673) fixed=true
  Marker LHFR: humerus_l (0.02781474 -0.1523815 0.01612368)
  Marker LHME: hand_l (0.02313198 -0.1446487 0.0009872569) fixed=true
  Marker LHPI: hand_l (0.00122993 -0.07162348 0.04404328) fixed=true
  Marker LHTH: hand_l (0.01208233 -0.0467433 -0.05687836) fixed=true
  Marker LHTO: humerus_l (0.0009989776 -0.08855175 -0.03495719)
  Marker LKNE: femur_l (-0.006294452 -0.4074308 -0.04564024) fixed=true
  Marker LKNI: femur_l (-0.001169212 -0.408059 0.04655466) fixed=true
  Marker LMT5: calcn_l (0.2050742 -0.001775268 -0.01051998)
  Marker LSCA: torso (-0.0899423 0.3645841 -0.0765236) fixed=true
  Marker LSHN: tibia_l (-0.04757839 -0.1072608 -0.06188399)
  Marker LSHO: torso (0.0185392 0.4081277 -0.14923) fixed=true
  Marker LTIA: tibia_l (0.04826131 -0.08237065 -0.008162036)
  Marker LTIB: tibia_l (0.02972823 -0.2164281 -0.01266404)
  Marker LTIC: tibia_l (0.02427183 -0.3333698 -0.007514027)
  Marker LTOE: toes_l (0.065004 7.6e-5 0.01199) fixed=true
  Marker LTOP: calcn_l (0.140229 -0.008022 -0.054751) fixed=true
  Marker LTOS: calcn_l (0.174425 0.001805 0.041132) fixed=true
  Marker LUMB: torso (-0.0799446 0.134934 0) fixed=true
  Marker LUMC: lumbar1 (-0.0703671 0.0116385 0) fixed=true
  Marker LWRA: radius_l (-0.01323321 -0.2241369 -0.04566187) fixed=true
  Marker LWRB: ulna_l (-0.03899153 -0.2334535 -0.02164956) fixed=true
  Marker NOSE: head (0.09557737 0.5670546 0.001487122) fixed=true
  Marker RAKI: tibia_r (0.001526739 -0.391544 -0.03113417) fixed=true
  Marker RANK: tibia_r (-0.01822213 -0.4169408 0.04690753) fixed=true
  Marker RBAC: torso (-0.09459887 0.2551503 0.08996089)
  Marker RBHD: head (-0.04838257 0.5393985 0.04486451) fixed=true
  Marker RBWT: pelvis (-0.1639884 0.0398533 0.04446041) fixed=true
  Marker RELB: ulna_r (-0.037785 0.002324 0.001899) fixed=true
  Marker RELS: humerus_r (0 -0.2842 -0.04417234) fixed=true
  Marker RELSO: humerus_r (0.01363853 -0.285532 0.03389712) fixed=true
  Marker RFBB: femur_r (-0.05903273 -0.3068214 -0.005427123)
  Marker RFBT: femur_r (-0.08316338 -0.1732924 -0.01878258)
  Marker RFFB: femur_r (0.07235484 -0.360659 0.007294155)
  Marker RFFT: femur_r (0.06101377 -0.1722578 -0.03315506)
  Marker RFHD: head (0.06441306 0.5862117 0.06131761) fixed=true
  Marker RFIN: hand_r (-0.004294943 -0.08591573 0.001617945) fixed=true
  Marker RFLB: femur_r (-0.007171316 -0.3152473 0.05355496)
  Marker RFLT: femur_r (0.001008061 -0.1565528 0.08855333)
  Marker RFMB: femur_r (0.005061579 -0.3138582 -0.06404704)
  Marker RFMT: femur_r (0.00383719 -0.1641476 -0.07824171)
  Marker RFPI: toes_r (0.0132 -0.006719 0.051954) fixed=true
  Marker RFRM: ulna_r (-0.0446287 -0.08531213 0.01082737)
  Marker RFWT: pelvis (0.006 0.01527926 0.115853)
  Marker RHAP: humerus_r (0.01787839 -0.1214276 -0.02829038)
  Marker RHBA: humerus_r (-0.03611685 -0.1871505 -0.006523324)
  Marker RHEB: calcn_r (0.014687 -0.023699 -0.010602) fixed=true
  Marker RHEE: calcn_r (-0.01329412 0.01790035 0.0006192976) fixed=true
  Marker RHFR: humerus_r (0.0398274 -0.1976506 -0.007045437)
  Marker RHME: hand_r (0.04329615 -0.1532612 -0.01013096) fixed=true
  Marker RHPI: hand_r (0.003919303 -0.0725305 -0.03875672) fixed=true
  Marker RHTH: hand_r (0.005382228 -0.04683503 0.05791159) fixed=true
  Marker RHTO: humerus_r (0.003315856 -0.152483 0.03256535)
  Marker RIBL: torso (0.07812519 0.1215421 -0.146994)
  Marker RIBR: torso (0.0920706 0.121542 0.128414)
  Marker RITL: torso (0.0618645 0.3301309 -0.05862501) fixed=true
  Marker RITR: torso (0.0618645 0.330131 0.058625) fixed=true
  Marker RKNE: femur_r (0.002547119 -0.4100252 0.04999875) fixed=true
  Marker RKNI: femur_r (-0.004129908 -0.4023856 -0.0452848) fixed=true
  Marker RMT5: calcn_r (0.2057972 -0.002326788 0.004264847)
  Marker RSCA: torso (-0.0899423 0.3630595 0.07652358) fixed=true
  Marker RSHN: tibia_r (-0.02400825 -0.1982057 0.07065802)
  Marker RSHO: torso (0.0185392 0.405992 0.1492301) fixed=true
  Marker RTIA: tibia_r (0.03480593 -0.0816495 -0.001754873)
  Marker RTIB: tibia_r (0.029727 -0.20083 0.012664)
  Marker RTIC: tibia_r (0.02427315 -0.3489053 0.00322703)
  Marker RTOE: toes_r (0.065004 7.6e-5 -0.01199) fixed=true
  Marker RTOP: calcn_r (0.140229 -0.008022 0.054751) fixed=true
  Marker RTOS: calcn_r (0.174425 0.001805 -0.041132) fixed=true
  Marker RWRA: radius_r (-0.008795479 -0.232909 0.04461181) fixed=true
  Marker RWRB: ulna_r (-0.03841988 -0.2408677 0.02057312) fixed=true
  Marker THD: head (-0.01410122 0.6577208 0.0008817963) fixed=true
