# OpenSim document version 40000
ScaleTool Pose2Sim_scaled:
  mass: 69 [kg]
  height: -1
  age: -1
  GenericModelMaker:
    model_file: Model_Pose2Sim_Body25.osim
  ModelScaler:
    apply: true
    scaling_order: measurements manualScale
    marker_file: ../S00_Demo_Session/S00_P00_SingleParticipant/S00_P00_T00_StaticTrial/pose-3d/S00_P00_T00_StaticTrial_0-12_filt_butterworth.trc
    time_range: 0.0166667 2.5
    preserve_mass_distribution: true
    output_model_file: Model_Pose2Sim_Body25_scaled.osim
    MeasurementSet:
      Measurement torso: apply=true
        MarkerPair: markers=(LShoulder LHip)
        MarkerPair: markers=(RShoulder RHip)
        BodyScale lumbar5: axes=(X Y Z)
        BodyScale lumbar4: axes=(X Y Z)
        BodyScale lumbar3: axes=(X Y Z)
        BodyScale lumbar2: axes=(X Y Z)
        BodyScale lumbar1: axes=(X Y Z)
        BodyScale torso: axes=(X Y Z)
      Measurement arm: apply=true
        MarkerPair: markers=(LShoulder LElbow)
        MarkerPair: markers=(RShoulder RElbow)
        BodyScale humerus_r: axes=(X Y Z)
        BodyScale humerus_l: axes=(X Y Z)
      Measurement forearm: apply=true
        MarkerPair: markers=(LElbow LWrist)
        MarkerPair: markers=(RElbow RWrist)
        BodyScale ulna_r: axes=(X Y Z)
        BodyScale radius_r: axes=(X Y Z)
        BodyScale hand_r: axes=(X Y Z)
        BodyScale ulna_l: axes=(X Y Z)
        BodyScale radius_l: axes=(X Y Z)
        BodyScale hand_l: axes=(X Y Z)
      Measurement thigh: apply=true
        MarkerPair: markers=(LHip LKnee)
        MarkerPair: markers=(RHip RKnee)
        BodyScale femur_r: axes=(X Y Z)
        BodyScale patella_r: axes=(X Y Z)
        BodyScale femur_l: axes=(X Y Z)
        BodyScale patella_l: axes=(X Y Z)
      Measurement shank: apply=true
        MarkerPair: markers=(LKnee LAnkle)
        MarkerPair: markers=(RKnee RAnkle)
        BodyScale tibia_r: axes=(X Y Z)
        BodyScale tibia_l: axes=(X Y Z)
      Measurement foot: apply=true
        MarkerPair: markers=(LHeel LBigToe)
        MarkerPair: markers=(RHeel RBigToe)
        BodyScale talus_r: axes=(X Y Z)
        BodyScale calcn_r: axes=(X Y Z)
        BodyScale toes_r: axes=(X Y Z)
        BodyScale talus_l: axes=(X Y Z)
        BodyScale calcn_l: axes=(X Y Z)
        BodyScale toes_l: axes=(X Y Z)
      Measurement head: apply=false
        MarkerPair: markers=(Head Nose)
        MarkerPair: markers=(Head Neck)
      Measurement pelvis: apply=true
        MarkerPair: markers=(RHip LHip)
        BodyScale pelvis: axes=(X Y Z)
        BodyScale sacrum: axes=(X Y Z)
    ScaleSet:
      Scale: scales=(0.95 0.95 0.95) segment=pelvis apply=false
      Scale: scales=(0.85 0.85 0.85) segment=patella_r apply=false
      Scale: scales=(0.85 0.85 0.85) segment=talus_r apply=false
      Scale: scales=(0.85 0.85 0.85) segment=toes_r apply=false
      Scale: scales=(0.85 0.85 0.85) segment=patella_l apply=false
      Scale: scales=(0.85 0.85 0.85) segment=talus_l apply=false
      Scale: scales=(0.85 0.85 0.85) segment=toes_l apply=false
      Scale: scales=(0.8 0.8 0.8) segment=torso apply=false
      Scale: scales=(0.8 0.8 0.8) segment=head apply=false
  MarkerPlacer:
    apply: false
    marker_file: ../S00_Demo_Session/S00_P00_SingleParticipant/S00_P00_T00_StaticTrial/pose-3d/S00_P00_T00_StaticTrial_0-12_filt_butterworth.trc
    time_range: 0.0166667 0.416667
    output_model_file: ../S00_Demo_Session/S00_P00_SingleParticipant/S00_P00_OpenSim/Model_Pose2Sim_S00_P00_Body25_scaled.osim
    max_marker_movement: -1
    IKTaskSet:
      IKMarkerTask Nose: apply=true weight=0.1
      IKMarkerTask Neck: apply=true weight=1
      IKMarkerTask LShoulder: apply=true weight=2
      IKMarkerTask RShoulder: apply=true weight=2
      IKMarkerTask LElbow: apply=true weight=1
      IKMarkerTask RElbow: apply=true weight=1
      IKMarkerTask LWrist: apply=true weight=1
      IKMarkerTask RWrist: apply=true weight=1
      IKMarkerTask LHip: apply=true weight=2
      IKMarkerTask RHip: apply=true weight=2
      IKMarkerTask LKnee: apply=true weight=1
      IKMarkerTask RKnee: apply=true weight=1
      IKMarkerTask LAnkle: apply=true weight=1
      IKMarkerTask RAnkle: apply=true weight=1
      IKMarkerTask LBigToe: apply=true weight=1
      IKMarkerTask LSmallToe: apply=true weight=1
      IKMarkerTask LHeel: apply=true weight=1
      IKMarkerTask RBigToe: apply=true weight=1
      IKMarkerTask RSmallToe: apply=true weight=1
      IKMarkerTask RHeel: apply=true weight=1
      IKMarkerTask CHip: apply=true weight=2
      IKCoordinateTask pelvis_tilt: apply=true weight=0 value_type=default_value value=0
      IKCoordinateTask pelvis_list: apply=true weight=0.1 value_type=default_value value=0
      IKCoordinateTask ankle_angle_r: apply=true weight=0 value_type=manual_value value=0
      IKCoordinateTask ankle_angle_l: apply=true weight=0 value_type=manual_value value=0
      IKCoordinateTask L5_S1_Flex_Ext: apply=true weight=0.1 value_type=default_value value=0
