# OpenSim document version 40500
ScaleTool Pose2Sim_scaled:
  mass: 69 [kg]
  height: -1
  age: -1
  ModelScaler:
    apply: true
    scaling_order: measurements
    marker_file: ../Demo_SinglePerson/pose-3d/S01_Demo_SingleTrial_0-99_filt_butterworth_LSTM.trc
    time_range: 0 1.633333
    preserve_mass_distribution: true
    MeasurementSet:
      Measurement foot: apply=true
        MarkerPair: markers=(r_calc_study r_toe_study)
        MarkerPair: markers=(r_calc_study r_5meta_study)
        MarkerPair: markers=(L_calc_study L_toe_study)
        MarkerPair: markers=(L_calc_study L_5meta_study)
        BodyScale talus_r: axes=(X Y Z)
        BodyScale calcn_r: axes=(X Y Z)
        BodyScale toes_r: axes=(X Y Z)
        BodyScale talus_l: axes=(X Y Z)
        BodyScale calcn_l: axes=(X Y Z)
        BodyScale toes_l: axes=(X Y Z)
      Measurement tibia_r: apply=true
        MarkerPair: markers=(r_knee_study r_ankle_study)
        MarkerPair: markers=(r_mknee_study r_mankle_study)
        BodyScale tibia_r: axes=(X Y Z)
      Measurement femur_r: apply=true
        MarkerPair: markers=(RHJC_study r_knee_study)
        BodyScale femur_r: axes=(X Y Z)
        BodyScale patella_r: axes=(X Y Z)
      Measurement tibia_l: apply=true
        MarkerPair: markers=(L_knee_study L_ankle_study)
        MarkerPair: markers=(L_mknee_study L_mankle_study)
        BodyScale tibia_l: axes=(X Y Z)
      Measurement femur_l: apply=true
        MarkerPair: markers=(LHJC_study L_knee_study)
        BodyScale femur_l: axes=(X Y Z)
        BodyScale patella_l: axes=(X Y Z)
      Measurement pelvisXY: apply=true
        MarkerPair: markers=(r.ASIS_study r.PSIS_study)
        MarkerPair: markers=(L.ASIS_study L.PSIS_study)
        BodyScale pelvis: axes=(X Y)
      Measurement pelvisZ: apply=true
        MarkerPair: markers=(RHJC_study LHJC_study)
        BodyScale pelvis: axes=Z
      Measurement torsoXY: apply=true
        MarkerPair: markers=(r_shoulder_study r.PSIS_study)
        MarkerPair: markers=(L_shoulder_study L.PSIS_study)
        MarkerPair: markers=(C7_study r.PSIS_study)
        MarkerPair: markers=(C7_study L.PSIS_study)
        BodyScale torso: axes=(X Y)
        BodyScale scapulaPhantom_r: axes=(X Y)
        BodyScale scapulaPhantom_l: axes=(X Y)
        BodyScale lumbar5: axes=(X Y)
        BodyScale lumbar4: axes=(X Y)
        BodyScale lumbar3: axes=(X Y)
        BodyScale lumbar2: axes=(X Y)
        BodyScale lumbar1: axes=(X Y)
        BodyScale Abdomen: axes=(X Y)
        BodyScale head: axes=(X Y)
        BodyScale sacrum: axes=(X Y)
      Measurement torsoZ: apply=true
        MarkerPair: markers=(r_shoulder_study L_shoulder_study)
        BodyScale torso: axes=Z
        BodyScale scapulaPhantom_r: axes=Z
        BodyScale scapulaPhantom_l: axes=Z
        BodyScale lumbar5: axes=Z
        BodyScale lumbar4: axes=Z
        BodyScale lumbar3: axes=Z
        BodyScale lumbar2: axes=Z
        BodyScale lumbar1: axes=Z
        BodyScale Abdomen: axes=Z
        BodyScale head: axes=Z
        BodyScale sacrum: axes=Z
      Measurement humerus: apply=true
        MarkerPair: markers=(r_shoulder_study r_lelbow_study)
        MarkerPair: markers=(r_shoulder_study r_melbow_study)
        MarkerPair: markers=(L_shoulder_study L_lelbow_study)
        MarkerPair: markers=(L_shoulder_study L_melbow_study)
        BodyScale humerus_r: axes=(X Y Z)
        BodyScale humerus_l: axes=(X Y Z)
      Measurement radius: apply=true
        MarkerPair: markers=(r_lwrist_study r_lelbow_study)
        MarkerPair: markers=(r_mwrist_study r_melbow_study)
        MarkerPair: markers=(L_lwrist_study L_lelbow_study)
        MarkerPair: markers=(L_mwrist_study L_melbow_study)
        BodyScale ulna_r: axes=(X Y Z)
        BodyScale radius_r: axes=(X Y Z)
        BodyScale hand_r: axes=(X Y Z)
        BodyScale ulna_l: axes=(X Y Z)
        BodyScale radius_l: axes=(X Y Z)
        BodyScale hand_l: axes=(X Y Z)
  MarkerPlacer:
    apply: false
    marker_file: ../Demo_SinglePerson/pose-3d/S01_Demo_SingleTrial_0-99_filt_butterworth_LSTM.trc
    time_range: 0.01666667 0.4166667
    output_model_file: D:\softs\github_david\pose2sim\Pose2Sim\OpenSim_Setup\..\S00_Demo_Session\S00_P00_SingleParticipant\S00_P00_OpenSim\Model_Pose2Sim_S00_P00_LSTM_scaled.osim
    max_marker_movement: -1
    IKTaskSet:
      IKMarkerTask r.ASIS_study: apply=true weight=10
      IKMarkerTask L.ASIS_study: apply=true weight=10
      IKMarkerTask r.PSIS_study: apply=true weight=10
      IKMarkerTask L.PSIS_study: apply=true weight=10
      IKMarkerTask r_knee_study: apply=true weight=10
      IKMarkerTask r_mknee_study: apply=true weight=10
      IKMarkerTask r_ankle_study: apply=true weight=10
      IKMarkerTask r_mankle_study: apply=true weight=10
      IKMarkerTask r_toe_study: apply=true weight=10
      IKMarkerTask r_5meta_study: apply=true weight=10
      IKMarkerTask r_calc_study: apply=true weight=10
      IKMarkerTask L_knee_study: apply=true weight=10
      IKMarkerTask L_mknee_study: apply=true weight=10
      IKMarkerTask L_ankle_study: apply=true weight=10
      IKMarkerTask L_mankle_study: apply=true weight=10
      IKMarkerTask L_toe_study: apply=true weight=10
      IKMarkerTask L_calc_study: apply=true weight=10
      IKMarkerTask L_5meta_study: apply=true weight=10
      IKMarkerTask r_shoulder_study: apply=true weight=5
      IKMarkerTask L_shoulder_study: apply=true weight=5
      IKMarkerTask C7_study: apply=true weight=20
      IKMarkerTask r_lelbow_study: apply=true weight=1
      IKMarkerTask r_lwrist_study: apply=true weight=5
      IKMarkerTask r_mwrist_study: apply=true weight=5
      IKMarkerTask L_lelbow_study: apply=true weight=1
      IKMarkerTask L_lwrist_study: apply=true weight=5
      IKMarkerTask L_mwrist_study: apply=true weight=5
      IKMarkerTask RHJC_study: apply=true weight=10
      IKMarkerTask LHJC_study: apply=true weight=10
      IKCoordinateTask pelvis_tilt: apply=true weight=0 value_type=default_value value=0
      IKCoordinateTask pelvis_list: apply=true weight=0.1 value_type=default_value value=0
      IKCoordinateTask ankle_angle_r: apply=true weight=0 value_type=manual_value value=0
      IKCoordinateTask ankle_angle_l: apply=true weight=0 value_type=manual_value value=0
      IKCoordinateTask L5_S1_Flex_Ext: apply=true weight=0.1 value_type=default_value value=0
